*Heading
** Job name: C1M1_H0002-NP Model name: C1M1_H0002-NP
** Generated by: Abaqus/CAE 2020
*Preprint, echo=NO, model=NO, history=NO, contact=NO
** ----------------------------------------------------------------
**
** PART INSTANCE: Part-1-1
**
*Node
      1,           0.,           0.
      2, 8.65999973e-05,           0.
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*Element, type=CPS4R
  1,   1,   2,  43,  42
  2,   2,   3,  44,  43
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*System
*Nset, nset=bottom, generate
  1,  41,   1
*Nset, nset=left, generate
   1,  821,   41
*Nset, nset=right, generate
  41,  861,   41
*Nset, nset=top, generate
 821,  861,    1
**
** MATERIALS
**
*Material, name=Al
*Elastic
26300., 0.33
*Material, name=SiC
*Elastic
192300., 0.17
